units           metal
dimension	    3
boundary	    s f s

atom_style	    atomic
neighbor	    0.3 bin
neigh_modify    delay 0 check yes

variable        lattice_constant equal 3.52
variable        inital_length equal 20*${lattice_constant}
variable        delta_y equal 0.00025

lattice		    fcc ${lattice_constant}
region		    box block 0 20 0 20 0 20 units lattice
create_box	    2 box
create_atoms	1 box
change_box      all x scale 1.5 y scale 1.5 z scale 1.5

#pair_style      eam/alloy
#pair_coeff      * * Mishin-Ni-Al-2009.eam.alloy Ni

pair_style      lj/cut 7.5

pair_coeff      1 1 0.5203 2.282
pair_coeff      2 2 0.05 2.338 2.625
pair_coeff      1 2 0.01 2.8 3.1428

mass		    1 58.6934
mass            2 469.5472

neighbor        0.3 bin
neigh_modify    delay 0 check yes

region          crack block INF 7 9 12 0 INF units lattice

minimize        1.0e-8 1.0e-8 10000 100000
timestep        0.0025

#velocity        all create 0.1 511124 #dist gaussian rot yes mom yes
#fix             relax all nvt temp 0.1 300 1.0
#thermo          500
#run             1000
#unfix           relax

thermo          250
neigh_modify    every 2 delay 0 check yes

delete_atoms    region crack

region          top block INF INF 18 INF INF INF units lattice
region          bot block INF INF INF 2 INF INF units lattice
group           top region top
group           bot region bot
group           boundary union top bot
group           mobile subtract all boundary


compute         stress_atom all stress/atom NULL
compute         pe_atom all pe/atom
variable        vol_avg equal "vol / count(all)"
variable        stressx atom "c_stress_atom[1] / v_vol_avg * 160.218"
variable        vonMises atom "sqrt( ((c_stress_atom[1]-c_stress_atom[2])^2 + (c_stress_atom[2]-c_stress_atom[3])^2 + (c_stress_atom[3]-c_stress_atom[1])^2 + 6*(c_stress_atom[4]^2 + c_stress_atom[5]^2 + c_stress_atom[6]^2)) / 2 ) / v_vol_avg * 160.218"
dump            1 all custom 250 records/TEST_crack_propagation_2x2_fixdeform.lammpstrj id type x y z fx fy fz v_stressx v_vonMises c_pe_atom
dump_modify     1 sort id


fix             1 all nve
fix		        2 boundary setforce NULL 0.0 0.0
#velocity        top set 0.0 0.1 0.0
#velocity	    mobile ramp vy 0.0 0.1 y 2 18 sum yes
#velocity        bot set 0.0 -0.1 0.0

variable        erate equal 5e-2
fix             def all deform 1 y erate ${erate} units box
thermo_modify   lost ignore

run             250
