units           metal
dimension	    3
boundary	    p p p
atom_style	    atomic
neighbor	    0.3 bin
neigh_modify    delay 0 check yes

variable        lattice_constant equal 3.52
variable        inital_length equal 20*${lattice_constant}
variable        delta_y equal 0.00025

lattice		    fcc 3.52
region		    box block 0 2.2 0 2.2 0 2.2 units lattice
create_box	    2 box
create_atoms	1 box


#pair_style      none
pair_style      lj/cut 7.5
#pair_coeff      1 1 0.5 2.28
#pair_coeff      1 2 0.4713 3.42
#pair_coeff      2 2 1.3333 4.56

pair_coeff      1 1 0.5  2.28
pair_coeff      2 2 0.01 4.56
pair_coeff      1 2 0.001 3.42

mass		    1 58.6934
mass            2 469.5472


#fix             1 all box/relax iso 0.0 vmax 0.0005
#minimize        1.0e-8 1.0e-8 10000 100000
#timestep        0.0025
#unfix           1

#velocity        all create 100
#fix             relax all nvt temp 0.001 0.001 0.1
#thermo          500
#run             1
#unfix           relax

thermo          250
compute         pe_atom all pe/atom
compute         stress_atom all stress/atom NULL
run             0

dump            1 all custom 250 TEST_APPROXIMATED_CRACK_dump_accurate.crack_GRAIN.lammpstrj id type x y z c_pe_atom
dump_modify     1 sort id

run 500
